# --- Basics --- #
units metal
newton on #newtons 3rd law for pairs
boundary m m m
atom_style atomic # coarse-grain liquids, solids, metals


# --- Read files --- #
read_data ../config_builder/sheet_vacuum.txt      # sheet
include ../config_builder/info_sheet_vacuum.in    # import variables

# --- Regions and groups --- #
# Sheet
region sheet_region block INF INF ${pullblock_yhi} ${pullblock_ylo} INF INF
group sheet region sheet_region

# Pullblocks
region PB_ylow_region  block INF INF INF ${pullblock_yhi} INF INF
region PB_yhigh_region block INF INF ${pullblock_ylo} INF INF INF
group PB_ylow region PB_ylow_region
group PB_yhigh region PB_yhigh_region

# # Moving atoms
group moving_atoms subtract all PB_ylow PB_yhigh


#--- Dynamics ---#
variable temp equal 5.0 # Kelvin

mass 1 12.0107 # C

velocity moving_atoms create ${temp} 5432373 dist gaussian

neighbor            0.5 bin
neigh_modify        delay 0 every 1 one 10000

# Airebo
pair_style airebo 6.4 1 1
pair_coeff * * ../potentials/CH.airebo C # C-C

timestep            0.0005
thermo              100
thermo_style custom step time temp
fix                 nve moving_atoms nve # (microcanonical)
# fix 2 all balance 1000 1.05 shift xy 10 1.05 # balance number of particles computed on each processor


# --- Dump --- #
dump 1 all custom 100 sheet_vacuum.data id type x y z vx vy vz

# ---  Relax --- #
# run  $(floor(2/dt)) # [t] = picoseconds

# --- Stretch --- #
# Parameters
variable stretch_speed_pct equal 0.05 # [% of pattern ylen per picoseconds]
variable stretch_max_pct equal 0.20
variable stretch_speed equal v_stretch_speed_pct*(v_pullblock_ylo-v_pullblock_yhi) # Henrik used 1,25
variable stretch_time equal $(floor(v_stretch_max_pct/v_stretch_speed_pct/dt))
print "Stretch speed time: $(v_stretch_time) timesteps, $(v_stretch_time*dt) ps"


# Output: timestep, stretch_pct
# print "# timestep, stretch_pct" file stretch_pct.txt
# fix stretch_pct all print 100 "$(step), $(time*v_stretch_speed_pct)" screen no append stretch_pct.txt
## ^^^Fix this to start at right time and reverse


# Stretch sheet
# fix ylow_freeze PB_ylow aveforce NULL NULL 0
# fix yhigh_freeze PB_yhigh aveforce NULL NULL 0
fix ylow_move  PB_ylow move linear 0 $(-v_stretch_speed/2) NULL units box
fix yhigh_move PB_yhigh move linear 0 $(v_stretch_speed/2) NULL units box

print "Stretching, timesteps: ${stretch_time}"
run ${stretch_time}

quit
# Pause
unfix ylow_move
unfix yhigh_move
run  $(floor(1/dt)) # [t] = picoseconds

# Conpress sheet
fix ylow_move  PB_ylow move linear 0 $(v_stretch_speed/2) 0 units box
fix yhigh_move PB_yhigh move linear 0 $(-v_stretch_speed/2) 0 units box

print "Reverse stretch, timesteps: ${stretch_time}"
run ${stretch_time}


# variable maxforce equal 0.05 # [eV/Å]
# variable force_speed equal 0.5# [ev/(Å*ps)]
# variable force_start_step equal $(step)
# variable pullforce equal v_force_speed*(step-v_force_start_step)*dt
# variable pull_time equal $(floor(v_maxforce/v_force_speed/dt))
# print "Pull time: $(v_pull_time) timesteps, $(v_pull_time*dt) ps"

# Write pull force to file
# print "# timestep, pull force [eV/Å]" file pullforce.txt
# fix pullforce all print 100 "$(step), $(v_pullforce)" screen no append pullforce.txt


# fix ylow_force PB_ylow addforce 0 -$(v_maxforce) 0
# fix yhigh_force PB_yhigh addforce 0 $(v_maxforce) 0


# fix ylow_freeze PB_ylow aveforce 0 NULL 0
# fix yhigh_freeze PB_yhigh aveforce 0 NULL 0
# fix ylow_force PB_ylow aveforce NULL -$(v_maxforce) NULL
# fix yhigh_force PB_yhigh aveforce NULL $(v_maxforce) NULL

# run  $(floor(5/dt)) # [t] = picoseconds
# run  ${pull_time} # [t] = picoseconds


# quit
